# OpenSim document version 40500
ScaleTool 3DGaitModel2392-scaled:
  mass: 43.6 [kg]
  height: -1
  age: -1
  GenericModelMaker:
    marker_set_file: ABI_MarkerSet 1.xml
  ModelScaler:
    apply: true
    marker_file: ../Control/Data/07/Calibration/cal.trc
    time_range: 0 4.22
    preserve_mass_distribution: true
  MarkerPlacer:
    apply: false
    time_range: -1 -1
    max_marker_movement: -1
    IKTaskSet:
      IKMarkerTask Sternum: apply=true weight=1
      IKMarkerTask RShoulder: apply=true weight=1
      IKMarkerTask LShoulder: apply=true weight=1
      IKMarkerTask RASIS: apply=true weight=1
      IKMarkerTask LASIS: apply=true weight=1
      IKMarkerTask LPSIS: apply=true weight=1
      IKMarkerTask RPSIS: apply=true weight=1
      IKMarkerTask RKneeLateral: apply=true weight=1
      IKMarkerTask RKneeMedial: apply=true weight=1
      IKMarkerTask RFibula: apply=true weight=1
      IKMarkerTask RShank: apply=true weight=1
      IKMarkerTask RAnkleLateral: apply=true weight=1
      IKMarkerTask RAnkleMedial: apply=true weight=1
      IKMarkerTask RHeel: apply=true weight=1
      IKMarkerTask RMT2: apply=true weight=1
      IKMarkerTask RMT5: apply=true weight=1
      IKMarkerTask RToe: apply=true weight=1
      IKMarkerTask LKneeLateral: apply=true weight=1
      IKMarkerTask LKneeMedial: apply=true weight=1
      IKMarkerTask LFibula: apply=true weight=1
      IKMarkerTask LShank: apply=true weight=1
      IKMarkerTask LAnkleLateral: apply=true weight=1
      IKMarkerTask LAnkleMedial: apply=true weight=1
      IKMarkerTask LHeel: apply=true weight=1
      IKMarkerTask LMT2: apply=true weight=1
      IKMarkerTask LMT5: apply=true weight=1
      IKMarkerTask LToe: apply=true weight=1
