# OpenSim document version 40000
InverseKinematicsTool sit:
  results_directory: ./
  model_file: subject01_simbody.osim
  constraint_weight: 20
  accuracy: 1e-5
  time_range: 5.46 7.81
  report_errors: true
  marker_file: walk.trc
  IKTaskSet gait2392_IK:
    IKMarkerTask Sternum: apply=true weight=1
    IKMarkerTask RShoulder: apply=true weight=0.5
    IKMarkerTask LShoulder: apply=true weight=0.5
    IKMarkerTask RASIS: apply=true weight=10
    IKMarkerTask LASIS: apply=true weight=10
    IKMarkerTask LPSIS: apply=true weight=10
    IKMarkerTask RPSIS: apply=true weight=10
    IKMarkerTask RKneeLateral: apply=true weight=1
    IKMarkerTask RFibula: apply=true weight=1
    IKMarkerTask RShank: apply=true weight=0.5
    IKMarkerTask RAnkleLateral: apply=true weight=1
    IKMarkerTask RHeel: apply=true weight=10
    IKMarkerTask RMT2: apply=true weight=1
    IKMarkerTask RMT5: apply=true weight=1
    IKMarkerTask LKneeLateral: apply=true weight=1
    IKMarkerTask LFibula: apply=true weight=1
    IKMarkerTask LShank: apply=true weight=0.5
    IKMarkerTask LAnkleLateral: apply=true weight=1
    IKMarkerTask LHeel: apply=true weight=10
    IKMarkerTask LMT2: apply=true weight=1
    IKMarkerTask LMT5: apply=true weight=1
    IKCoordinateTask subtalar_angle_r: apply=true weight=1000 value_type=default_value value=0
    IKCoordinateTask mtp_angle_r: apply=true weight=1000 value_type=default_value value=0
    IKCoordinateTask subtalar_angle_l: apply=true weight=1000 value_type=default_value value=0
    IKCoordinateTask mtp_angle_l: apply=true weight=1000 value_type=default_value value=0
